// COMSOL Multiphysics 5.2.1.152 model "via_branch.mph"
// Outline of the model tree

Parameters
  E = 1.609e-19
  Cu_resis = 5e-8
  Z = 1
  Omega = 1.18e-29
  k = 1.3806e-23
  B = 1e11
  D0 = 7.56e-8
  Ea = 0.9*E
  T = 503[K]
  j1 = 1.68e10[A/m^2]  // via current density
  j2 = 1.12e10[A/m^2]  // main branch current density
  tmax = 1e7[s]  // total simulation time
  tstep = 1e4[s]  // time steps
  Da = D0*exp(-Ea/k/T)
  kappa = Da*B*Omega/k/T
  L1 = 40[nm]  // vai lenth
  L2 = 170[um]  // main branch length

Geometry
  geom1 "Geometry 1" (1D, length unit µm)
    i1: Interval | p1 = -L1; p2 = 0; p = {-L1, 0}
    i2: Interval | p2 = L2; p = {0, L2}
    fin: Finalize "Form Union"

Physics
  c: CoefficientFormPDE on all domains
    dependent variable u
    Units.CustomSourceTermUnit = Pa
    cfeq1: CoefficientFormPDE (default) | c = kappa; f = 0; da = 1; ga = -j1*E*Z*Cu_resis/Omega*kappa
    zflx1: ZeroFluxBoundary "Zero Flux 1" (default)
    init1: init "Initial Values 1" (default)
    cfeq2: CoefficientFormPDE on domains 2 | c = kappa; f = 0; da = 1; ga = -j2*E*Z*Cu_resis/Omega*kappa
    flux1: FluxBoundary "Flux/Source 1" (disabled) on boundaries 1 | q = kappa/delta
    flux2: FluxBoundary "Flux/Source 2" (disabled) on boundaries 2 | g = (j2-j1)*E*Z*Cu_resis/Omega*kappa
    flux3: FluxBoundary "Flux/Source 3" (disabled) on boundaries 3 | g = -j2*E*Z*Cu_resis/Omega*kappa

Mesh
  mesh1 "Mesh 1" (physics-controlled)
    size: MeshSizeDefault | hauto = 5

Studies
  std1 "Study 1"
    time: Transient "Time Dependent" | tlist = range(0,tstep,tmax)
    time1: Transient "Time Dependent 1" (disabled)
      tlist = range(0,tstep,tmax)
      useinitsol = on
      initmethod = init
      initstudy = zero
      initsol = current

Solver configurations
  sol1 "nuc" (study std1)
    v1: Variables "Dependent Variables 1"
    t1: Time "Time-Dependent Solver 1" | tlist = range(0,tstep,tmax)
      dDef: Direct
      fc1: FullyCoupled
  sol2 "gro" (study std1)
    v1: Variables "Dependent Variables 1"
    t1: Time "Time-Dependent Solver 1" | tlist = range(0,tstep,tmax)
      dDef: Direct
      fc1: FullyCoupled | linsolver = dDef

Datasets
  dset1: Solution | solution = sol2

Derived values
  pev1: EvalPoint "Point Evaluation 1" on boundaries 2 | data = dset1; table = tbl1; expr = u

Tables
  tbl1: Table
    // Point Evaluation 1 (u)
    Time (s) | Dependent variable u (1), Point: 1 | Dependent variable u (1), Point: 2
    0 | 3.99606e+06 | 3.54701e+06
    10000 | 9.17329e+07 | 9.12751e+07
    20000 | 1.29601e+08 | 1.29143e+08
    30000 | 1.58662e+08 | 1.58204e+08
    40000 | 1.83174e+08 | 1.82716e+08
    50000 | 2.04795e+08 | 2.04337e+08
    60000 | 2.24278e+08 | 2.2382e+08
    70000 | 2.42223e+08 | 2.41765e+08
    80000 | 2.5894e+08 | 2.58482e+08
    90000 | 2.74644e+08 | 2.74186e+08
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
Plots
  pg4: PlotGroup1D "1D Plot Group 4" | data = dset1
    lngr1: LineGraph on all domains | data = dset1; expr = u; xdata = expr; xdataexpr = x